// SBML level 3 version 2

model Inverter1_module(Cell, Ara_AraC_protein, HlyIIR_protein)

  // Compartments:
  compartment Cell = 1;

  // Species:
  substanceOnly species $Ara_AraC_protein in Cell = 0;
  substanceOnly species Inverter1_fc in Cell = 2;
  substanceOnly species HlyIIR_protein in Cell = 0;

  // Parameters:
  kr_f = 0.5; kr_f is "Forward repression binding rate";
  kr_r = 1; kr_r is "Reverse repression binding rate";
  ka_f = 0.0033; ka_f is "Forward activation binding rate";
  ka_r = 1; ka_r is "Reverse activation binding rate";
  ko_f = 0.033; ko_f is "Forward RNAP binding rate";
  ko_r = 1; ko_r is "Reverse RNAP binding rate";
  kao_f = 1; kao_f is "Forward activated RNAP binding rate";
  kao_r = 1; kao_r is "Reverse activated RNAP binding rate";
  nc = 2; nc is "Stoichiometry of binding";
  nr = 30; nr is "Initial RNAP count";
  ko = 0.05; ko is "Open complex production rate";
  kb = 0.0001; kb is "Basal production rate";
  ng = 2; ng is "Initial promoter count";
  np = 10; np is "Stoichiometry of production";
  ka = 0.25; ka is "Activated production rate";

  // Reactions:
  HlyIIR_protein_interaction: => 10 HlyIIR_protein; Inverter1_fc*(kb*(ko_f/ko_r)*nr + ka*(kao_f/kao_r)*nr*(ka_f/ka_r*Ara_AraC_protein)^nc)/(1 + ko_f/ko_r*nr + kao_f/kao_r*nr*(ka_f/ka_r*Ara_AraC_protein)^nc);  // modifiers: Inverter1_fc, Ara_AraC_protein
end
