// SBML level 3 version 2

model topModel()
  // Created by iBioSim flatten routine

  // Compartments:
  compartment Cell = 1;

  // Species:
  substanceOnly species YFP_protein in Cell = 0;
  substanceOnly species TetR_protein in Cell = 0;
  substanceOnly species BM3R1_protein in Cell = 0;
  substanceOnly species AmtR_protein in Cell = 0;
  substanceOnly species IPTG_LacI_protein in Cell = 0;
  substanceOnly species PhlF_protein in Cell = 0;
  substanceOnly species BetI_protein in Cell = 0;
  substanceOnly species $Ara in Cell = 0;
  substanceOnly species $aTc in Cell = 0;
  substanceOnly species Ara_AraC_protein in Cell = 0;
  substanceOnly species aTc_TetR_protein in Cell = 0;
  substanceOnly species LacI_protein in Cell = 0;
  substanceOnly species SrpR_protein in Cell = 0;
  substanceOnly species $IPTG in Cell = 0;
  substanceOnly species AraC_protein in Cell = 0;
  substanceOnly species HlyIIR_protein in Cell = 0;
  substanceOnly species topModel_PhlFpart_module_sub__pAmtR in Cell = 2;
  substanceOnly species topModel_PhlFpart_module_sub__pSrpR in Cell = 2;
  substanceOnly species topModel_YFPpart_module_sub__pPhlF in Cell = 2;
  substanceOnly species topModel_YFPpart_module_sub__pBetI in Cell = 2;
  substanceOnly species topModel_Inverter1_module_sub__Inverter1_fc in Cell = 2;
  substanceOnly species topModel_Inverter2_module_sub__Inverter2_fc in Cell = 2;
  substanceOnly species topModel_AmtRpart_module_sub__pHlyIIR in Cell = 2;
  substanceOnly species topModel_AmtRpart_module_sub__pBAD in Cell = 2;
  substanceOnly species topModel_HlyIIRpart_module_sub__pBAD in Cell = 2;
  substanceOnly species topModel_HlyIIRpart_module_sub__pTet in Cell = 2;
  substanceOnly species topModel_BetIpart_module_sub__pHlyIIR in Cell = 2;
  substanceOnly species topModel_BetIpart_module_sub__pTet in Cell = 2;

  // Parameters:
  kd = 0.0075; kd is "Degradation rate";
  kc_f = 0.05; kc_f is "Forward complex formation rate";
  kc_r = 1; kc_r is "Reverse complex formation rate";
  nc = 2; nc is "Stoichiometry of binding";
  topModel_PhlFpart_module_sub__kr_f = 0.5; topModel_PhlFpart_module_sub__kr_f is "Forward repression binding rate";
  topModel_PhlFpart_module_sub__kr_r = 1; topModel_PhlFpart_module_sub__kr_r is "Reverse repression binding rate";
  topModel_PhlFpart_module_sub__ka_f = 0.0033; topModel_PhlFpart_module_sub__ka_f is "Forward activation binding rate";
  topModel_PhlFpart_module_sub__ka_r = 1; topModel_PhlFpart_module_sub__ka_r is "Reverse activation binding rate";
  topModel_PhlFpart_module_sub__ko_f = 0.033; topModel_PhlFpart_module_sub__ko_f is "Forward RNAP binding rate";
  topModel_PhlFpart_module_sub__ko_r = 1; topModel_PhlFpart_module_sub__ko_r is "Reverse RNAP binding rate";
  topModel_PhlFpart_module_sub__kao_f = 1; topModel_PhlFpart_module_sub__kao_f is "Forward activated RNAP binding rate";
  topModel_PhlFpart_module_sub__kao_r = 1; topModel_PhlFpart_module_sub__kao_r is "Reverse activated RNAP binding rate";
  topModel_PhlFpart_module_sub__nc = 2; topModel_PhlFpart_module_sub__nc is "Stoichiometry of binding";
  topModel_PhlFpart_module_sub__nr = 30; topModel_PhlFpart_module_sub__nr is "Initial RNAP count";
  topModel_PhlFpart_module_sub__ko = 0.05; topModel_PhlFpart_module_sub__ko is "Open complex production rate";
  topModel_PhlFpart_module_sub__kb = 0.0001; topModel_PhlFpart_module_sub__kb is "Basal production rate";
  topModel_PhlFpart_module_sub__ng = 2; topModel_PhlFpart_module_sub__ng is "Initial promoter count";
  topModel_PhlFpart_module_sub__np = 10; topModel_PhlFpart_module_sub__np is "Stoichiometry of production";
  topModel_PhlFpart_module_sub__ka = 0.25; topModel_PhlFpart_module_sub__ka is "Activated production rate";
  topModel_YFPpart_module_sub__kr_f = 0.5; topModel_YFPpart_module_sub__kr_f is "Forward repression binding rate";
  topModel_YFPpart_module_sub__kr_r = 1; topModel_YFPpart_module_sub__kr_r is "Reverse repression binding rate";
  topModel_YFPpart_module_sub__ka_f = 0.0033; topModel_YFPpart_module_sub__ka_f is "Forward activation binding rate";
  topModel_YFPpart_module_sub__ka_r = 1; topModel_YFPpart_module_sub__ka_r is "Reverse activation binding rate";
  topModel_YFPpart_module_sub__ko_f = 0.033; topModel_YFPpart_module_sub__ko_f is "Forward RNAP binding rate";
  topModel_YFPpart_module_sub__ko_r = 1; topModel_YFPpart_module_sub__ko_r is "Reverse RNAP binding rate";
  topModel_YFPpart_module_sub__kao_f = 1; topModel_YFPpart_module_sub__kao_f is "Forward activated RNAP binding rate";
  topModel_YFPpart_module_sub__kao_r = 1; topModel_YFPpart_module_sub__kao_r is "Reverse activated RNAP binding rate";
  topModel_YFPpart_module_sub__nc = 2; topModel_YFPpart_module_sub__nc is "Stoichiometry of binding";
  topModel_YFPpart_module_sub__nr = 30; topModel_YFPpart_module_sub__nr is "Initial RNAP count";
  topModel_YFPpart_module_sub__ko = 0.05; topModel_YFPpart_module_sub__ko is "Open complex production rate";
  topModel_YFPpart_module_sub__kb = 0.0001; topModel_YFPpart_module_sub__kb is "Basal production rate";
  topModel_YFPpart_module_sub__ng = 2; topModel_YFPpart_module_sub__ng is "Initial promoter count";
  topModel_YFPpart_module_sub__np = 10; topModel_YFPpart_module_sub__np is "Stoichiometry of production";
  topModel_YFPpart_module_sub__ka = 0.25; topModel_YFPpart_module_sub__ka is "Activated production rate";
  topModel_Inverter1_module_sub__kr_f = 0.5; topModel_Inverter1_module_sub__kr_f is "Forward repression binding rate";
  topModel_Inverter1_module_sub__kr_r = 1; topModel_Inverter1_module_sub__kr_r is "Reverse repression binding rate";
  topModel_Inverter1_module_sub__ka_f = 0.0033; topModel_Inverter1_module_sub__ka_f is "Forward activation binding rate";
  topModel_Inverter1_module_sub__ka_r = 1; topModel_Inverter1_module_sub__ka_r is "Reverse activation binding rate";
  topModel_Inverter1_module_sub__ko_f = 0.033; topModel_Inverter1_module_sub__ko_f is "Forward RNAP binding rate";
  topModel_Inverter1_module_sub__ko_r = 1; topModel_Inverter1_module_sub__ko_r is "Reverse RNAP binding rate";
  topModel_Inverter1_module_sub__kao_f = 1; topModel_Inverter1_module_sub__kao_f is "Forward activated RNAP binding rate";
  topModel_Inverter1_module_sub__kao_r = 1; topModel_Inverter1_module_sub__kao_r is "Reverse activated RNAP binding rate";
  topModel_Inverter1_module_sub__nc = 2; topModel_Inverter1_module_sub__nc is "Stoichiometry of binding";
  topModel_Inverter1_module_sub__nr = 30; topModel_Inverter1_module_sub__nr is "Initial RNAP count";
  topModel_Inverter1_module_sub__ko = 0.05; topModel_Inverter1_module_sub__ko is "Open complex production rate";
  topModel_Inverter1_module_sub__kb = 0.0001; topModel_Inverter1_module_sub__kb is "Basal production rate";
  topModel_Inverter1_module_sub__ng = 2; topModel_Inverter1_module_sub__ng is "Initial promoter count";
  topModel_Inverter1_module_sub__np = 10; topModel_Inverter1_module_sub__np is "Stoichiometry of production";
  topModel_Inverter1_module_sub__ka = 0.25; topModel_Inverter1_module_sub__ka is "Activated production rate";
  topModel_Inverter2_module_sub__kr_f = 0.5; topModel_Inverter2_module_sub__kr_f is "Forward repression binding rate";
  topModel_Inverter2_module_sub__kr_r = 1; topModel_Inverter2_module_sub__kr_r is "Reverse repression binding rate";
  topModel_Inverter2_module_sub__ka_f = 0.0033; topModel_Inverter2_module_sub__ka_f is "Forward activation binding rate";
  topModel_Inverter2_module_sub__ka_r = 1; topModel_Inverter2_module_sub__ka_r is "Reverse activation binding rate";
  topModel_Inverter2_module_sub__ko_f = 0.033; topModel_Inverter2_module_sub__ko_f is "Forward RNAP binding rate";
  topModel_Inverter2_module_sub__ko_r = 1; topModel_Inverter2_module_sub__ko_r is "Reverse RNAP binding rate";
  topModel_Inverter2_module_sub__kao_f = 1; topModel_Inverter2_module_sub__kao_f is "Forward activated RNAP binding rate";
  topModel_Inverter2_module_sub__kao_r = 1; topModel_Inverter2_module_sub__kao_r is "Reverse activated RNAP binding rate";
  topModel_Inverter2_module_sub__nc = 2; topModel_Inverter2_module_sub__nc is "Stoichiometry of binding";
  topModel_Inverter2_module_sub__nr = 30; topModel_Inverter2_module_sub__nr is "Initial RNAP count";
  topModel_Inverter2_module_sub__ko = 0.05; topModel_Inverter2_module_sub__ko is "Open complex production rate";
  topModel_Inverter2_module_sub__kb = 0.0001; topModel_Inverter2_module_sub__kb is "Basal production rate";
  topModel_Inverter2_module_sub__ng = 2; topModel_Inverter2_module_sub__ng is "Initial promoter count";
  topModel_Inverter2_module_sub__np = 10; topModel_Inverter2_module_sub__np is "Stoichiometry of production";
  topModel_Inverter2_module_sub__ka = 0.25; topModel_Inverter2_module_sub__ka is "Activated production rate";
  topModel_AmtRpart_module_sub__kr_f = 0.5; topModel_AmtRpart_module_sub__kr_f is "Forward repression binding rate";
  topModel_AmtRpart_module_sub__kr_r = 1; topModel_AmtRpart_module_sub__kr_r is "Reverse repression binding rate";
  topModel_AmtRpart_module_sub__ka_f = 0.0033; topModel_AmtRpart_module_sub__ka_f is "Forward activation binding rate";
  topModel_AmtRpart_module_sub__ka_r = 1; topModel_AmtRpart_module_sub__ka_r is "Reverse activation binding rate";
  topModel_AmtRpart_module_sub__ko_f = 0.033; topModel_AmtRpart_module_sub__ko_f is "Forward RNAP binding rate";
  topModel_AmtRpart_module_sub__ko_r = 1; topModel_AmtRpart_module_sub__ko_r is "Reverse RNAP binding rate";
  topModel_AmtRpart_module_sub__kao_f = 1; topModel_AmtRpart_module_sub__kao_f is "Forward activated RNAP binding rate";
  topModel_AmtRpart_module_sub__kao_r = 1; topModel_AmtRpart_module_sub__kao_r is "Reverse activated RNAP binding rate";
  topModel_AmtRpart_module_sub__nc = 2; topModel_AmtRpart_module_sub__nc is "Stoichiometry of binding";
  topModel_AmtRpart_module_sub__nr = 30; topModel_AmtRpart_module_sub__nr is "Initial RNAP count";
  topModel_AmtRpart_module_sub__ko = 0.05; topModel_AmtRpart_module_sub__ko is "Open complex production rate";
  topModel_AmtRpart_module_sub__kb = 0.0001; topModel_AmtRpart_module_sub__kb is "Basal production rate";
  topModel_AmtRpart_module_sub__ng = 2; topModel_AmtRpart_module_sub__ng is "Initial promoter count";
  topModel_AmtRpart_module_sub__np = 10; topModel_AmtRpart_module_sub__np is "Stoichiometry of production";
  topModel_AmtRpart_module_sub__ka = 0.25; topModel_AmtRpart_module_sub__ka is "Activated production rate";
  topModel_HlyIIRpart_module_sub__kr_f = 0.5; topModel_HlyIIRpart_module_sub__kr_f is "Forward repression binding rate";
  topModel_HlyIIRpart_module_sub__kr_r = 1; topModel_HlyIIRpart_module_sub__kr_r is "Reverse repression binding rate";
  topModel_HlyIIRpart_module_sub__ka_f = 0.0033; topModel_HlyIIRpart_module_sub__ka_f is "Forward activation binding rate";
  topModel_HlyIIRpart_module_sub__ka_r = 1; topModel_HlyIIRpart_module_sub__ka_r is "Reverse activation binding rate";
  topModel_HlyIIRpart_module_sub__ko_f = 0.033; topModel_HlyIIRpart_module_sub__ko_f is "Forward RNAP binding rate";
  topModel_HlyIIRpart_module_sub__ko_r = 1; topModel_HlyIIRpart_module_sub__ko_r is "Reverse RNAP binding rate";
  topModel_HlyIIRpart_module_sub__kao_f = 1; topModel_HlyIIRpart_module_sub__kao_f is "Forward activated RNAP binding rate";
  topModel_HlyIIRpart_module_sub__kao_r = 1; topModel_HlyIIRpart_module_sub__kao_r is "Reverse activated RNAP binding rate";
  topModel_HlyIIRpart_module_sub__nc = 2; topModel_HlyIIRpart_module_sub__nc is "Stoichiometry of binding";
  topModel_HlyIIRpart_module_sub__nr = 30; topModel_HlyIIRpart_module_sub__nr is "Initial RNAP count";
  topModel_HlyIIRpart_module_sub__ko = 0.05; topModel_HlyIIRpart_module_sub__ko is "Open complex production rate";
  topModel_HlyIIRpart_module_sub__kb = 0.0001; topModel_HlyIIRpart_module_sub__kb is "Basal production rate";
  topModel_HlyIIRpart_module_sub__ng = 2; topModel_HlyIIRpart_module_sub__ng is "Initial promoter count";
  topModel_HlyIIRpart_module_sub__np = 10; topModel_HlyIIRpart_module_sub__np is "Stoichiometry of production";
  topModel_HlyIIRpart_module_sub__ka = 0.25; topModel_HlyIIRpart_module_sub__ka is "Activated production rate";
  topModel_BetIpart_module_sub__kr_f = 0.5; topModel_BetIpart_module_sub__kr_f is "Forward repression binding rate";
  topModel_BetIpart_module_sub__kr_r = 1; topModel_BetIpart_module_sub__kr_r is "Reverse repression binding rate";
  topModel_BetIpart_module_sub__ka_f = 0.0033; topModel_BetIpart_module_sub__ka_f is "Forward activation binding rate";
  topModel_BetIpart_module_sub__ka_r = 1; topModel_BetIpart_module_sub__ka_r is "Reverse activation binding rate";
  topModel_BetIpart_module_sub__ko_f = 0.033; topModel_BetIpart_module_sub__ko_f is "Forward RNAP binding rate";
  topModel_BetIpart_module_sub__ko_r = 1; topModel_BetIpart_module_sub__ko_r is "Reverse RNAP binding rate";
  topModel_BetIpart_module_sub__kao_f = 1; topModel_BetIpart_module_sub__kao_f is "Forward activated RNAP binding rate";
  topModel_BetIpart_module_sub__kao_r = 1; topModel_BetIpart_module_sub__kao_r is "Reverse activated RNAP binding rate";
  topModel_BetIpart_module_sub__nc = 2; topModel_BetIpart_module_sub__nc is "Stoichiometry of binding";
  topModel_BetIpart_module_sub__nr = 30; topModel_BetIpart_module_sub__nr is "Initial RNAP count";
  topModel_BetIpart_module_sub__ko = 0.05; topModel_BetIpart_module_sub__ko is "Open complex production rate";
  topModel_BetIpart_module_sub__kb = 0.0001; topModel_BetIpart_module_sub__kb is "Basal production rate";
  topModel_BetIpart_module_sub__ng = 2; topModel_BetIpart_module_sub__ng is "Initial promoter count";
  topModel_BetIpart_module_sub__np = 10; topModel_BetIpart_module_sub__np is "Stoichiometry of production";
  topModel_BetIpart_module_sub__ka = 0.25; topModel_BetIpart_module_sub__ka is "Activated production rate";

  // Reactions:
  AraC_degradation_interaction: AraC_protein => ; kd*AraC_protein;
  Complex_aTc_TetR_protein: 2 TetR_protein + 2 $aTc -> aTc_TetR_protein; kc_f*TetR_protein^nc*aTc^nc - kc_r*aTc_TetR_protein;
  SrpR_degradation_interaction: SrpR_protein => ; kd*SrpR_protein;
  TetR_degradation_interaction: TetR_protein => ; kd*TetR_protein;
  Ara_AraC_protein_degradation_interaction: Ara_AraC_protein => ; kd*Ara_AraC_protein;
  IPTG_LacI_protein_degradation_interaction: IPTG_LacI_protein => ; kd*IPTG_LacI_protein;
  BM3R1_degradation_interaction: BM3R1_protein => ; kd*BM3R1_protein;
  PhlF_degradation_interaction: PhlF_protein => ; kd*PhlF_protein;
  aTc_TetR_protein_degradation_interaction: aTc_TetR_protein => ; kd*aTc_TetR_protein;
  Complex_IPTG_LacI_protein: 2 $IPTG + 2 LacI_protein -> IPTG_LacI_protein; kc_f*IPTG^nc*LacI_protein^nc - kc_r*IPTG_LacI_protein;
  YFP_degradation_interaction: YFP_protein => ; kd*YFP_protein;
  LacI_degradation_interaction: LacI_protein => ; kd*LacI_protein;
  Complex_Ara_AraC_protein: 2 AraC_protein + 2 $Ara -> Ara_AraC_protein; kc_f*AraC_protein^nc*Ara^nc - kc_r*Ara_AraC_protein;
  HlyIIR_degradation_interaction: HlyIIR_protein => ; kd*HlyIIR_protein;
  BetI_degradation_interaction: BetI_protein => ; kd*BetI_protein;
  AmtR_degradation_interaction: AmtR_protein => ; kd*AmtR_protein;
  topModel_PhlFpart_module_sub__PhlF_protein_interaction_0: => 10 PhlF_protein; topModel_PhlFpart_module_sub__pAmtR*topModel_PhlFpart_module_sub__ko*topModel_PhlFpart_module_sub__ko_f/topModel_PhlFpart_module_sub__ko_r*topModel_PhlFpart_module_sub__nr/(1 + topModel_PhlFpart_module_sub__ko_f/topModel_PhlFpart_module_sub__ko_r*topModel_PhlFpart_module_sub__nr + (topModel_PhlFpart_module_sub__kr_f/topModel_PhlFpart_module_sub__kr_r*SrpR_protein)^topModel_PhlFpart_module_sub__nc);  // modifiers: topModel_PhlFpart_module_sub__pAmtR, SrpR_protein
  topModel_PhlFpart_module_sub__PhlF_protein_interaction_1: => 10 PhlF_protein; topModel_PhlFpart_module_sub__pSrpR*topModel_PhlFpart_module_sub__ko*topModel_PhlFpart_module_sub__ko_f/topModel_PhlFpart_module_sub__ko_r*topModel_PhlFpart_module_sub__nr/(1 + topModel_PhlFpart_module_sub__ko_f/topModel_PhlFpart_module_sub__ko_r*topModel_PhlFpart_module_sub__nr + (topModel_PhlFpart_module_sub__kr_f/topModel_PhlFpart_module_sub__kr_r*AmtR_protein)^topModel_PhlFpart_module_sub__nc);  // modifiers: topModel_PhlFpart_module_sub__pSrpR, AmtR_protein
  topModel_YFPpart_module_sub__YFP_protein_interaction_0: => 10 YFP_protein; topModel_YFPpart_module_sub__pPhlF*topModel_YFPpart_module_sub__ko*topModel_YFPpart_module_sub__ko_f/topModel_YFPpart_module_sub__ko_r*topModel_YFPpart_module_sub__nr/(1 + topModel_YFPpart_module_sub__ko_f/topModel_YFPpart_module_sub__ko_r*topModel_YFPpart_module_sub__nr + (topModel_YFPpart_module_sub__kr_f/topModel_YFPpart_module_sub__kr_r*PhlF_protein)^topModel_YFPpart_module_sub__nc);  // modifiers: topModel_YFPpart_module_sub__pPhlF, PhlF_protein
  topModel_YFPpart_module_sub__YFP_protein_interaction_1: => 10 YFP_protein; topModel_YFPpart_module_sub__pBetI*topModel_YFPpart_module_sub__ko*topModel_YFPpart_module_sub__ko_f/topModel_YFPpart_module_sub__ko_r*topModel_YFPpart_module_sub__nr/(1 + topModel_YFPpart_module_sub__ko_f/topModel_YFPpart_module_sub__ko_r*topModel_YFPpart_module_sub__nr + (topModel_YFPpart_module_sub__kr_f/topModel_YFPpart_module_sub__kr_r*BetI_protein)^topModel_YFPpart_module_sub__nc);  // modifiers: topModel_YFPpart_module_sub__pBetI, BetI_protein
  topModel_Inverter1_module_sub__BM3R1_protein_interaction: => 10 BM3R1_protein; topModel_Inverter1_module_sub__Inverter1_fc*topModel_Inverter1_module_sub__ko*topModel_Inverter1_module_sub__ko_f/topModel_Inverter1_module_sub__ko_r*topModel_Inverter1_module_sub__nr/(1 + topModel_Inverter1_module_sub__ko_f/topModel_Inverter1_module_sub__ko_r*topModel_Inverter1_module_sub__nr + (topModel_Inverter1_module_sub__kr_f/topModel_Inverter1_module_sub__kr_r*LacI_protein)^topModel_Inverter1_module_sub__nc);  // modifiers: topModel_Inverter1_module_sub__Inverter1_fc, LacI_protein
  topModel_Inverter2_module_sub__SrpR_protein_interaction: => 10 SrpR_protein; topModel_Inverter2_module_sub__Inverter2_fc*topModel_Inverter2_module_sub__ko*topModel_Inverter2_module_sub__ko_f/topModel_Inverter2_module_sub__ko_r*topModel_Inverter2_module_sub__nr/(1 + topModel_Inverter2_module_sub__ko_f/topModel_Inverter2_module_sub__ko_r*topModel_Inverter2_module_sub__nr + (topModel_Inverter2_module_sub__kr_f/topModel_Inverter2_module_sub__kr_r*BM3R1_protein)^topModel_Inverter2_module_sub__nc);  // modifiers: topModel_Inverter2_module_sub__Inverter2_fc, BM3R1_protein
  topModel_AmtRpart_module_sub__AmtR_protein_interaction_0: => 10 AmtR_protein; topModel_AmtRpart_module_sub__pHlyIIR*(topModel_AmtRpart_module_sub__kb*topModel_AmtRpart_module_sub__ko_f/topModel_AmtRpart_module_sub__ko_r*topModel_AmtRpart_module_sub__nr + topModel_AmtRpart_module_sub__ka*topModel_AmtRpart_module_sub__kao_f/topModel_AmtRpart_module_sub__kao_r*topModel_AmtRpart_module_sub__nr*(topModel_AmtRpart_module_sub__ka_f/topModel_AmtRpart_module_sub__ka_r*Ara_AraC_protein)^topModel_AmtRpart_module_sub__nc)/(1 + topModel_AmtRpart_module_sub__ko_f/topModel_AmtRpart_module_sub__ko_r*topModel_AmtRpart_module_sub__nr + topModel_AmtRpart_module_sub__kao_f/topModel_AmtRpart_module_sub__kao_r*topModel_AmtRpart_module_sub__nr*(topModel_AmtRpart_module_sub__ka_f/topModel_AmtRpart_module_sub__ka_r*Ara_AraC_protein)^topModel_AmtRpart_module_sub__nc);  // modifiers: topModel_AmtRpart_module_sub__pHlyIIR, Ara_AraC_protein
  topModel_AmtRpart_module_sub__AmtR_protein_interaction_1: => 10 AmtR_protein; topModel_AmtRpart_module_sub__pBAD*topModel_AmtRpart_module_sub__ko*topModel_AmtRpart_module_sub__ko_f/topModel_AmtRpart_module_sub__ko_r*topModel_AmtRpart_module_sub__nr/(1 + topModel_AmtRpart_module_sub__ko_f/topModel_AmtRpart_module_sub__ko_r*topModel_AmtRpart_module_sub__nr + (topModel_AmtRpart_module_sub__kr_f/topModel_AmtRpart_module_sub__kr_r*HlyIIR_protein)^topModel_AmtRpart_module_sub__nc);  // modifiers: topModel_AmtRpart_module_sub__pBAD, HlyIIR_protein
  topModel_HlyIIRpart_module_sub__HlyIIR_protein_interaction_0: => 10 HlyIIR_protein; topModel_HlyIIRpart_module_sub__pBAD*(topModel_HlyIIRpart_module_sub__kb*topModel_HlyIIRpart_module_sub__ko_f/topModel_HlyIIRpart_module_sub__ko_r*topModel_HlyIIRpart_module_sub__nr + topModel_HlyIIRpart_module_sub__ka*topModel_HlyIIRpart_module_sub__kao_f/topModel_HlyIIRpart_module_sub__kao_r*topModel_HlyIIRpart_module_sub__nr*(topModel_HlyIIRpart_module_sub__ka_f/topModel_HlyIIRpart_module_sub__ka_r*Ara_AraC_protein)^topModel_HlyIIRpart_module_sub__nc)/(1 + topModel_HlyIIRpart_module_sub__ko_f/topModel_HlyIIRpart_module_sub__ko_r*topModel_HlyIIRpart_module_sub__nr + topModel_HlyIIRpart_module_sub__kao_f/topModel_HlyIIRpart_module_sub__kao_r*topModel_HlyIIRpart_module_sub__nr*(topModel_HlyIIRpart_module_sub__ka_f/topModel_HlyIIRpart_module_sub__ka_r*Ara_AraC_protein)^topModel_HlyIIRpart_module_sub__nc);  // modifiers: topModel_HlyIIRpart_module_sub__pBAD, Ara_AraC_protein
  topModel_HlyIIRpart_module_sub__HlyIIR_protein_interaction_1: => 10 HlyIIR_protein; topModel_HlyIIRpart_module_sub__pTet*topModel_HlyIIRpart_module_sub__ko*topModel_HlyIIRpart_module_sub__ko_f/topModel_HlyIIRpart_module_sub__ko_r*topModel_HlyIIRpart_module_sub__nr/(1 + topModel_HlyIIRpart_module_sub__ko_f/topModel_HlyIIRpart_module_sub__ko_r*topModel_HlyIIRpart_module_sub__nr + (topModel_HlyIIRpart_module_sub__kr_f/topModel_HlyIIRpart_module_sub__kr_r*TetR_protein)^topModel_HlyIIRpart_module_sub__nc);  // modifiers: topModel_HlyIIRpart_module_sub__pTet, TetR_protein
  topModel_BetIpart_module_sub__BetI_protein_interaction_0: => 10 BetI_protein; topModel_BetIpart_module_sub__pHlyIIR*topModel_BetIpart_module_sub__ko*topModel_BetIpart_module_sub__ko_f/topModel_BetIpart_module_sub__ko_r*topModel_BetIpart_module_sub__nr/(1 + topModel_BetIpart_module_sub__ko_f/topModel_BetIpart_module_sub__ko_r*topModel_BetIpart_module_sub__nr + (topModel_BetIpart_module_sub__kr_f/topModel_BetIpart_module_sub__kr_r*HlyIIR_protein)^topModel_BetIpart_module_sub__nc);  // modifiers: topModel_BetIpart_module_sub__pHlyIIR, HlyIIR_protein
  topModel_BetIpart_module_sub__BetI_protein_interaction_1: => 10 BetI_protein; topModel_BetIpart_module_sub__pTet*topModel_BetIpart_module_sub__ko*topModel_BetIpart_module_sub__ko_f/topModel_BetIpart_module_sub__ko_r*topModel_BetIpart_module_sub__nr/(1 + topModel_BetIpart_module_sub__ko_f/topModel_BetIpart_module_sub__ko_r*topModel_BetIpart_module_sub__nr + (topModel_BetIpart_module_sub__kr_f/topModel_BetIpart_module_sub__kr_r*TetR_protein)^topModel_BetIpart_module_sub__nc);  // modifiers: topModel_BetIpart_module_sub__pTet, TetR_protein
end
