// SBML level 3 version 2
import "PhlFpart_module.xml";
import "TetRsensor_module.xml";
import "YFPpart_module.xml";
import "AraCsensor_module.xml";
import "Inverter1_module.xml";
import "Inverter2_module.xml";
import "AmtRpart_module.xml";
import "HlyIIRpart_module.xml";
import "BetIpart_module.xml";
import "LacIsensor_module.xml";

model topModel(Cell, YFP_protein, TetR_protein, BM3R1_protein, AmtR_protein, IPTG_LacI_protein, PhlF_protein, BetI_protein, Ara, aTc, Ara_AraC_protein, aTc_TetR_protein, LacI_protein, SrpR_protein, IPTG, AraC_protein, HlyIIR_protein)

  // Sub-modules:
  topModel_PhlFpart_module_sub: PhlFpart_module();
  topModel_TetRsensor_module_sub: TetRsensor_module();
  topModel_YFPpart_module_sub: YFPpart_module();
  topModel_AraCsensor_module_sub: AraCsensor_module();
  topModel_Inverter1_module_sub: Inverter1_module();
  topModel_Inverter2_module_sub: Inverter2_module();
  topModel_AmtRpart_module_sub: AmtRpart_module();
  topModel_HlyIIRpart_module_sub: HlyIIRpart_module();
  topModel_BetIpart_module_sub: BetIpart_module();
  topModel_LacIsensor_module_sub: LacIsensor_module();

  // Compartments:
  compartment Cell = 1; topModel_PhlFpart_module_sub.compartment__Cell is Cell; topModel_TetRsensor_module_sub.compartment__Cell is Cell; topModel_YFPpart_module_sub.compartment__Cell is Cell; topModel_AraCsensor_module_sub.compartment__Cell is Cell; topModel_Inverter1_module_sub.compartment__Cell is Cell; topModel_Inverter2_module_sub.compartment__Cell is Cell; topModel_AmtRpart_module_sub.compartment__Cell is Cell; topModel_HlyIIRpart_module_sub.compartment__Cell is Cell; topModel_BetIpart_module_sub.compartment__Cell is Cell; topModel_LacIsensor_module_sub.compartment__Cell is Cell;

  // Species:
  substanceOnly species YFP_protein in Cell = 0; topModel_YFPpart_module_sub.output__YFP_protein is YFP_protein;
  substanceOnly species TetR_protein in Cell = 0; topModel_TetRsensor_module_sub.output__TetR_protein is TetR_protein; topModel_HlyIIRpart_module_sub.input__TetR_protein is TetR_protein; topModel_BetIpart_module_sub.input__TetR_protein is TetR_protein;
  substanceOnly species BM3R1_protein in Cell = 0; topModel_Inverter1_module_sub.output__BM3R1_protein is BM3R1_protein; topModel_Inverter2_module_sub.input__BM3R1_protein is BM3R1_protein;
  substanceOnly species AmtR_protein in Cell = 0; topModel_PhlFpart_module_sub.input__AmtR_protein is AmtR_protein; topModel_AmtRpart_module_sub.output__AmtR_protein is AmtR_protein;
  substanceOnly species IPTG_LacI_protein in Cell = 0;
  substanceOnly species PhlF_protein in Cell = 0; topModel_PhlFpart_module_sub.output__PhlF_protein is PhlF_protein; topModel_YFPpart_module_sub.input__PhlF_protein is PhlF_protein;
  substanceOnly species BetI_protein in Cell = 0; topModel_YFPpart_module_sub.input__BetI_protein is BetI_protein; topModel_BetIpart_module_sub.output__BetI_protein is BetI_protein;
  substanceOnly species $Ara in Cell = 0;
  substanceOnly species $aTc in Cell = 0;
  substanceOnly species Ara_AraC_protein in Cell = 0; topModel_AmtRpart_module_sub.input__Ara_AraC_protein is Ara_AraC_protein; topModel_HlyIIRpart_module_sub.input__Ara_AraC_protein is Ara_AraC_protein;
  substanceOnly species aTc_TetR_protein in Cell = 0;
  substanceOnly species LacI_protein in Cell = 0; topModel_Inverter1_module_sub.input__LacI_protein is LacI_protein; topModel_LacIsensor_module_sub.output__LacI_protein is LacI_protein;
  substanceOnly species SrpR_protein in Cell = 0; topModel_PhlFpart_module_sub.input__SrpR_protein is SrpR_protein; topModel_Inverter2_module_sub.output__SrpR_protein is SrpR_protein;
  substanceOnly species $IPTG in Cell = 0;
  substanceOnly species AraC_protein in Cell = 0; topModel_AraCsensor_module_sub.output__AraC_protein is AraC_protein;
  substanceOnly species HlyIIR_protein in Cell = 0; topModel_AmtRpart_module_sub.input__HlyIIR_protein is HlyIIR_protein; topModel_HlyIIRpart_module_sub.output__HlyIIR_protein is HlyIIR_protein; topModel_BetIpart_module_sub.input__HlyIIR_protein is HlyIIR_protein;

  // Parameters:
  kd = 0.0075; kd is "Degradation rate";
  kc_f = 0.05; kc_f is "Forward complex formation rate";
  kc_r = 1; kc_r is "Reverse complex formation rate";
  nc = 2; nc is "Stoichiometry of binding";

  // Reactions:
  AraC_degradation_interaction: AraC_protein => ; kd*AraC_protein;
  Complex_aTc_TetR_protein: 2 TetR_protein + 2 $aTc -> aTc_TetR_protein; kc_f*TetR_protein^nc*aTc^nc - kc_r*aTc_TetR_protein;
  SrpR_degradation_interaction: SrpR_protein => ; kd*SrpR_protein;
  TetR_degradation_interaction: TetR_protein => ; kd*TetR_protein;
  Ara_AraC_protein_degradation_interaction: Ara_AraC_protein => ; kd*Ara_AraC_protein;
  IPTG_LacI_protein_degradation_interaction: IPTG_LacI_protein => ; kd*IPTG_LacI_protein;
  BM3R1_degradation_interaction: BM3R1_protein => ; kd*BM3R1_protein;
  PhlF_degradation_interaction: PhlF_protein => ; kd*PhlF_protein;
  aTc_TetR_protein_degradation_interaction: aTc_TetR_protein => ; kd*aTc_TetR_protein;
  Complex_IPTG_LacI_protein: 2 $IPTG + 2 LacI_protein -> IPTG_LacI_protein; kc_f*IPTG^nc*LacI_protein^nc - kc_r*IPTG_LacI_protein;
  YFP_degradation_interaction: YFP_protein => ; kd*YFP_protein;
  LacI_degradation_interaction: LacI_protein => ; kd*LacI_protein;
  Complex_Ara_AraC_protein: 2 AraC_protein + 2 $Ara -> Ara_AraC_protein; kc_f*AraC_protein^nc*Ara^nc - kc_r*Ara_AraC_protein;
  HlyIIR_degradation_interaction: HlyIIR_protein => ; kd*HlyIIR_protein;
  BetI_degradation_interaction: BetI_protein => ; kd*BetI_protein;
  AmtR_degradation_interaction: AmtR_protein => ; kd*AmtR_protein;
end
