// SBML level 3 version 2

model BetIpart_module(Cell, HlyIIR_protein, BetI_protein, TetR_protein)

  // Compartments:
  compartment Cell = 1;

  // Species:
  substanceOnly species $HlyIIR_protein in Cell = 0;
  substanceOnly species pHlyIIR in Cell = 2;
  substanceOnly species pTet in Cell = 2;
  substanceOnly species BetI_protein in Cell = 0;
  substanceOnly species $TetR_protein in Cell = 0;

  // Parameters:
  kr_f = 0.5; kr_f is "Forward repression binding rate";
  kr_r = 1; kr_r is "Reverse repression binding rate";
  ka_f = 0.0033; ka_f is "Forward activation binding rate";
  ka_r = 1; ka_r is "Reverse activation binding rate";
  ko_f = 0.033; ko_f is "Forward RNAP binding rate";
  ko_r = 1; ko_r is "Reverse RNAP binding rate";
  kao_f = 1; kao_f is "Forward activated RNAP binding rate";
  kao_r = 1; kao_r is "Reverse activated RNAP binding rate";
  nc = 2; nc is "Stoichiometry of binding";
  nr = 30; nr is "Initial RNAP count";
  ko = 0.05; ko is "Open complex production rate";
  kb = 0.0001; kb is "Basal production rate";
  ng = 2; ng is "Initial promoter count";
  np = 10; np is "Stoichiometry of production";
  ka = 0.25; ka is "Activated production rate";

  // Reactions:
  BetI_protein_interaction_0: => 10 BetI_protein; pHlyIIR*ko*(ko_f/ko_r)*nr/(1 + ko_f/ko_r*nr + (kr_f/kr_r*HlyIIR_protein)^nc);  // modifiers: pHlyIIR, HlyIIR_protein
  BetI_protein_interaction_1: => 10 BetI_protein; pTet*ko*(ko_f/ko_r)*nr/(1 + ko_f/ko_r*nr + (kr_f/kr_r*TetR_protein)^nc);  // modifiers: pTet, TetR_protein
end
